// COMSOL Multiphysics 5.0.0.243 model "Imas_validacao_modelo_dx.mph"
// Outline of the model tree

Parameters
  dx = 0  // deslocamento x
  dy = 0  // deslocamento y
  dz = 0  // deslocamento z
  tz = 0  // inclinacao z
  ge = 1.2  // gap externo
  gi = 0.6  // gap interno
  hm = 10  // altura ima
  wm = 8  // largura ima
  re = 75  // raio externo
  hiee = 6  // altura ferro estator externo
  wiee = wm+6  // largura ferro estator externo
  hir = hiee  // altura ferro rotor
  wir = wnr+4  // largura ferro rotor
  wnr = 6  // largura nucleo rotor
  hiei = hiee  // altura ferro estator interno
  wiei = 6  // largura ferro estator interno
  rnb = 12  // raio nucleo bobina
  hnb = 8  // altura nucleo bobina
  wwb = 0.255  // largura fio bobina
  nvb = hnb*.75/wwb  // voltas bobina por nivel
  nnb = nb/nvb  // niveis enrolamento bobina
  web = nnb*wwb  // largura enrolamento bobina
  nb = 300  // total voltas bobina
  imax = 0  // corrente maxima

Selections
  sel1: Explicit on no domains

Geometry
  geom1 "Geometry 1" (3D, length unit mm)
    blk1: Block | pos = {-re+13, 0, 5}; base = center; size = {50, 50, 50}
    wp1: WorkPlane
      r1: Rectangle | pos = {-re, -hm/2}; size = {wm, hm}
      r2: Rectangle | pos = {-re, -hm/2-hiee}; size = {wiee, hiee}
      r3: Rectangle | pos = {-re, hm/2}; size = {wiee, hiee}
      r4: Rectangle | pos = {-re+wiee+ge, -hm/2-hiee}; size = {wir, hir}
      r5: Rectangle | pos = {-re+wiee+ge, hm/2}; size = {wir, hir}
      r6: Rectangle | pos = {-re+wiee+ge+(wir-wnr), -hm/2}; size = {wnr, hm}
    rev1: Revolve | input = wp1; angle2 = 10
    mov1: Move | input = rev1(4), rev1(5), rev1(6); displx = dx; disply = dy; displz = dz
    fin: Finalize "Form Union"

Materials
  mat2: Common "Air" on all domains
    def "Basic"
      relpermeability = 1
      relpermittivity = 1
      dynamicviscosity = eta(T[1/K])[Pa*s]
      ratioofspecificheat = 1.4
      electricconductivity = 0[S/m]
      heatcapacity = Cp(T[1/K])[J/(kg*K)]
      density = rho(pA[1/Pa],T[1/K])[kg/m^3]
      thermalconductivity = k(T[1/K])[W/(m*K)]
      soundspeed = cs(T[1/K])[m/s]
      eta: Piecewise | arg = T; extrap = constant; pieces = {200.0, 1600.0, -8.38278E-7+8.35717342E-8*T^1-7.69429583E-11*T^2+4.6437266E-14*T^3-1.06585607E-17*T^4}
      Cp: Piecewise | arg = T; extrap = constant; pieces = {200.0, 1600.0, 1047.63657-0.372589265*T^1+9.45304214E-4*T^2-6.02409443E-7*T^3+1.2858961E-10*T^4}
      rho: Analytic | expr = pA*0.02897/8.314/T; args = {pA, T}; dermethod = manual; argders = {{pA, d(pA*0.02897/8.314/T,pA)}, {T, d(pA*0.02897/8.314/T,T)}}
      k: Piecewise | arg = T; extrap = constant; pieces = {200.0, 1600.0, -0.00227583562+1.15480022E-4*T^1-7.90252856E-8*T^2+4.11702505E-11*T^3-7.43864331E-15*T^4}
      cs: Analytic | expr = sqrt(1.4*287*T); args = T; dermethod = manual; argders = {T, d(sqrt(1.4*287*T),T)}
  mat4: Common "1020 (UNS G10200) [solid]" on domains 2, 4-7
    def "Basic"
      dL = dL(T[1/K])-dL(Tempref[1/K])
      CTE = CTE(T[1/K])[1/K]
      thermalconductivity = k(T[1/K])[W/(m*K)]
      resistivity = res(T[1/K])[ohm*m]
      emissivity = epsilon(T[1/K])
      thermalexpansioncoefficient = alpha(T[1/K])[1/K]+(Tempref-293[K])/(T-Tempref)*(alpha(T[1/K])[1/K]-alpha(Tempref[1/K])[1/K])
      heatcapacity = C(T[1/K])[J/(kg*K)]
      mu = mu(T[1/K])[Pa]
      electricconductivity = sigma(T[1/K])[S/m]
      density = rho(T[1/K])[kg/m^3]
      TD = TD(T[1/K])[m^2/s]
      kappa = kappa(T[1/K])[Pa]
      relpermittivity = 1
      relpermeability = 1
      dL: Piecewise
        arg = T
        pieces = 
          {293.0, 1065.0, -0.002440417+5.044861E-6*T^1+1.2594E-8*T^2-4.727316E-12*T^3}
          {1065.0, 1253.0, -0.0145039+2.05632E-5*T^1}
      CTE: Piecewise | arg = T; pieces = {293.0, 1065.0, 5.044861E-6+2.5188E-8*T^1-1.418195E-11*T^2}
      k: Piecewise
        arg = T
        pieces = 
          {26.0, 80.0, 2.355152+1.12718*T^1-0.005144291*T^2}
          {80.0, 300.0, 40.98143+0.3375615*T^1-0.001471151*T^2+2.023406E-6*T^3}
      res: Piecewise
        arg = T
        pieces = 
          {293.0, 1073.0, 9.391673E-8+7.568236E-12*T^1+8.641318E-13*T^2}
          {1073.0, 1573.0, -3.625E-7+2.652646E-9*T^1-1.562286E-12*T^2+3.333333E-16*T^3}
      epsilon: Piecewise | arg = T; pieces = {589.0, 1088.0, 1.395221-0.003891153*T^1+8.010151E-6*T^2-5.970098E-9*T^3+1.373119E-12*T^4}
      alpha: Piecewise
        arg = T
        pieces = 
          {293.0, 1065.0, 3.702292E-6+2.930806E-8*T^1-2.805246E-11*T^2+9.790445E-15*T^3}
          {1065.0, 1253.0, -1.044381E-6+1.019586E-8*T^1}
      C: Piecewise | arg = T; pieces = {293.0, 848.0, -215.7306+6.0185*T^1-0.01834293*T^2+2.414973E-5*T^3-1.078824E-8*T^4}
      mu: Piecewise
        arg = T
        pieces = 
          {4.0, 273.0, 8.626526E10+1636497.0*T^1-108981.6*T^2+291.1261*T^3-0.3377859*T^4}
          {273.0, 1050.0, 8.301552E10+9184755.0*T^1-38834.5*T^2}
          {1050.0, 1500.0, 7.694034E10-2.580357E7*T^1}
      sigma: Piecewise
        arg = T
        pieces = 
          {293.0, 1073.0, 1/(8.641318E-13*T^2+7.568236E-12*T+9.391673E-08)}
          {1073.0, 1573.0, 1/(3.333333E-16*T^3-1.562286E-12*T^2+2.652646E-09*T-3.625E-07)}
      rho: Piecewise
        arg = T
        pieces = 
          {293.0, 1065.0, 7919.309-0.124948*T^1-2.88651E-4*T^2+1.131694E-7*T^3}
          {1065.0, 1253.0, 8183.48-0.4654125*T^1}
      TD: Piecewise
        arg = T
        pieces = 
          {295.0, 1048.0, 1.908565E-5-1.445398E-8*T^1}
          {1048.0, 1248.0, -6.844E-5+1.158517E-7*T^1-4.46478E-11*T^2}
      kappa: Piecewise
        arg = T
        pieces = 
          {4.0, 100.0, 1.800573E11-3478717.0*T^1+151512.1*T^2-5485.327*T^3+28.28329*T^4}
          {100.0, 273.0, 1.818111E11-4.023792E7*T^1+84204.68*T^2-93.09453*T^3}
          {273.0, 1500.0, 1.842649E11-2.509462E7*T^1-28588.37*T^2}
    Enu "Young's modulus and Poisson's ratio"
      youngsmodulus = E(T[1/K])[Pa]
      poissonsratio = nu(T[1/K])
      E: Piecewise
        arg = T
        pieces = 
          {4.0, 273.0, 2.217366E11+5020008.0*T^1-305140.4*T^2+926.6601*T^3-1.145454*T^4}
          {273.0, 1050.0, 2.109875E11+3.572844E7*T^1-106319.6*T^2}
          {1050.0, 1500.0, 2.024261E11-6.77381E7*T^1}
      nu: Piecewise
        arg = T
        pieces = 
          {4.0, 120.0, 0.2850355-1.662951E-6*T^1}
          {120.0, 273.0, 0.2848011-7.147353E-6*T^1+6.558945E-8*T^2}
          {273.0, 1053.0, 0.2712267+7.030261E-5*T^1-3.856929E-8*T^2+1.246582E-11*T^3}
          {1053.0, 1500.0, 0.3165268-1.242823E-6*T^1+1.661461E-9*T^2}
    BHCurve
      normB = BH(normH[m/A])[T]
      normH = sqrt(H1^2+H2^2+H3^2)
      int1: Interpolation
        funcname = BH
        table = 
          {0, 0}
          {32, .02}
          {60, .05}
          {80, .09}
          {100, .14}
          {120, .20}
          {150, .27}
          {183, .34}
          {230, .42}
          {278, .49}
          {342, .56}
          {448, .62}
          {577, .73}
          {782, .77}
          {1721, .96}
          {4130, 1.33}
          {12100, 1.47}
          {23300, 1.62}
          {43300, 1.69}
          {60300, 1.77}
          {76300, 1.82}
          {110000, 1.87}
          {134600, 1.92}
          {183100, 1.98}
          {338300, 2.18}
          {422000, 2.28}
        defineinv = off
        defvars = off
        extrap = linear
    HBCurve
      normH = HB(normB[1/T])[A/m]
      normB = sqrt(B1^2+B2^2+B3^2)
      int1: Interpolation
        funcname = HB
        table = 
          {0, 0}
          {.02, 32}
          {.05, 60}
          {.09, 80}
          {.14, 100}
          {.20, 120}
          {.27, 150}
          {.34, 183}
          {.42, 230}
          {.49, 278}
          {.56, 342}
          {.62, 448}
          {.73, 577}
          {.77, 782}
          {.96, 1721}
          {1.33, 4130}
          {1.47, 12100}
          {1.62, 23300}
          {1.69, 43300}
          {1.77, 60300}
          {1.82, 76300}
          {1.87, 110000}
          {1.92, 134600}
          {1.98, 183100}
          {2.18, 338300}
          {2.28, 422000}
        extrap = linear
  mat3: Common "Copper [solid,residual resistivity ratio of 30]" on no domains
    def "Basic"
      dL = dL_solid_1(T[1/K])-dL_solid_1(Tempref[1/K])
      CTE = CTE_solid_1(T[1/K])[1/K]
      thermalconductivity = k_solid_residual_resistivity_ratio_of_30_1(T[1/K])[W/(m*K)]
      resistivity = res_solid_1(T[1/K])[ohm*m]
      thermalexpansioncoefficient = alpha_solid_1(T[1/K])[1/K]+(Tempref-293[K])/(T-Tempref)*(alpha_solid_1(T[1/K])[1/K]-alpha_solid_1(Tempref[1/K])[1/K])
      heatcapacity = C_solid_1(T[1/K])[J/(kg*K)]
      HC = HC_solid_1(T[1/K])[J/(mol*K)]
      mu = mu(T[1/K])[Pa]
      electricconductivity = sigma_solid_1(T[1/K])[S/m]
      density = rho_solid_1(T[1/K])[kg/m^3]
      VP = VP_solid_1(T[1/K])[Pa]
      kappa = kappa(T[1/K])[Pa]
      relpermittivity = 1
      relpermeability = 1
      dL_solid_1: Piecewise
        arg = T
        extrap = constant
        pieces = 
          {4.0, 80.0, -0.003272586-6.837087E-8*T^1+1.574823E-8*T^2+3.040518E-10*T^3}
          {80.0, 282.0, -0.003491523+2.12144E-6*T^1+5.197613E-8*T^2-6.339761E-11*T^3}
          {282.0, 1250.0, -0.004540862+1.446717E-5*T^1+3.415834E-9*T^2+3.472655E-13*T^3}
      CTE_solid_1: Piecewise "Piecewise 1a"
        arg = T
        extrap = constant
        pieces = 
          {4.0, 13.0, -8.574809E-9+4.13567E-9*T^1-5.673583E-10*T^2+5.520915E-11*T^3}
          {13.0, 60.0, 2.194122E-7-2.662325E-8*T^1+4.800942E-10*T^2+6.093443E-11*T^3-6.195564E-13*T^4}
          {60.0, 300.0, -8.81E-6+3.292355E-7*T^1-1.773823E-9*T^2+4.545667E-12*T^3-4.483983E-15*T^4}
          {300.0, 1250.0, 9.897871E-6+3.796303E-8*T^1-6.61053E-11*T^2+5.60845E-14*T^3-1.591449E-17*T^4}
      k_solid_residual_resistivity_ratio_of_30_1: Piecewise "Piecewise 1b"
        arg = T
        extrap = constant
        pieces = 
          {1.0, 40.0, 12.55868+36.66487*T^1+1.387207*T^2-0.07168113*T^3+6.99799E-4*T^4}
          {40.0, 70.0, 2174.919-45.25448*T^1+0.3738471*T^2-9.504397E-4*T^3}
          {70.0, 100.0, 2545.87-67.53869*T^1+0.8176488*T^2-0.004470238*T^3+9.22619E-6*T^4}
          {100.0, 300.0, 555.4-2.116905*T^1+0.008971429*T^2-1.266667E-5*T^3}
          {300.0, 1358.0, 423.7411-0.3133575*T^1+0.001013916*T^2-1.570451E-6*T^3+1.06222E-9*T^4-2.64198E-13*T^5}
      res_solid_1: Piecewise "Piecewise 1c"
        arg = T
        extrap = constant
        pieces = 
          {1.0, 7.0, 2.0E-11}
          {7.0, 40.0, 1.002557E-11+2.945503E-12*T^1-2.767806E-13*T^2+8.665115E-15*T^3}
          {40.0, 100.0, 1.370786E-9-8.741734E-11*T^1+1.738251E-12*T^2-6.532611E-15*T^3}
          {100.0, 1358.0, -3.514582E-9+7.064722E-11*T^1-8.917638E-15*T^2+1.026538E-17*T^3}
      alpha_solid_1: Piecewise "Piecewise 1d"
        arg = T
        extrap = constant
        pieces = 
          {4.0, 100.0, 1.104402E-5+4.812192E-8*T^1-1.223083E-10*T^2}
          {100.0, 230.0, 1.276495E-5+1.849516E-8*T^1+1.203963E-11*T^2-1.023671E-13*T^3}
          {230.0, 1250.0, 1.54043E-5+4.517462E-9*T^1-5.067436E-13*T^2}
      C_solid_1: Piecewise "Piecewise 1e"
        arg = T
        extrap = constant
        pieces = 
          {1.0, 18.0, 0.008168055+0.00104457*T^1+0.003441219*T^2+2.847033E-4*T^3+2.246429E-5*T^4}
          {18.0, 60.0, 29.05972-3.767169*T^1+0.1540539*T^2-0.001048364*T^3+3.010206E-7*T^4}
          {60.0, 300.0, -215.2814+8.236392*T^1-0.04732108*T^2+1.291112E-4*T^3-1.357031E-7*T^4}
          {300.0, 1300.0, 342.764+0.1338348*T^1+5.535252E-5*T^2-1.971221E-7*T^3+1.140747E-10*T^4}
      HC_solid_1: Piecewise "Piecewise 1f"
        arg = T
        extrap = constant
        pieces = 
          {1.0, 18.0, 5.190474E-4+6.637828E-5*T^1+2.186757E-4*T^2+1.809176E-5*T^3+1.427516E-6*T^4}
          {18.0, 60.0, 1.846629-0.2393885*T^1+0.00978951*T^2-6.661932E-5*T^3+1.912866E-8*T^4}
          {60.0, 300.0, -13.68027+0.5233899*T^1-0.003007065*T^2+8.204498E-6*T^3-8.623391E-9*T^4}
          {300.0, 1300.0, 21.78128+0.008504666*T^1+3.517431E-6*T^2-1.252632E-8*T^3+7.248993E-12*T^4}
      mu: Piecewise | arg = T; extrap = constant; pieces = {4.0, 300.0, 5.12E10+4.718448E-7*T^1-46300.0*T^2}
      sigma_solid_1: Piecewise "Piecewise 1g"
        arg = T
        extrap = constant
        pieces = 
          {1.0, 7.0, 1/(2.000000E-11)}
          {7.0, 40.0, 1/(8.665115E-15*T^3-2.767806E-13*T^2+2.945503E-12*T+1.002557E-11)}
          {40.0, 100.0, 1/(-6.532611E-15*T^3+1.738251E-12*T^2-8.741734E-11*T+1.370786E-09)}
          {100.0, 1358.0, 1/(1.026538E-17*T^3-8.917638E-15*T^2+7.064722E-11*T-3.514582E-09)}
      rho_solid_1: Piecewise "Piecewise 1h"
        arg = T
        extrap = constant
        pieces = 
          {4.0, 90.0, 9028.155+0.001936185*T^1-4.310034E-4*T^2-8.227902E-6*T^3}
          {90.0, 250.0, 9034.264-0.05885933*T^1-0.001406238*T^2+1.736657E-6*T^3}
          {250.0, 1250.0, 9062.604-0.3926111*T^1-8.730517E-5*T^2}
      VP_solid_1: Piecewise "Piecewise 1i" | arg = T; extrap = constant; pieces = {293.0, 1358.0, (exp((-1.774800e+004/T-7.317000e-001*log10(T)+1.200381e+001)*log(10.0)))*1.333200e+002}
      kappa: Piecewise | arg = T; extrap = constant; pieces = {4.0, 300.0, 1.408545E11-151138.5*T^1-155999.5*T^2}
    Enu "Young's modulus and Poisson's ratio"
      youngsmodulus = E(T[1/K])[Pa]
      poissonsratio = nu(T[1/K])
      E: Piecewise
        arg = T
        extrap = constant
        pieces = 
          {4.0, 300.0, 1.37E11-3.330669E-6*T^1-127000.0*T^2}
          {300.0, 1250.0, 1.408492E11-4.703751E7*T^1-12923.82*T^2}
      nu: Piecewise | arg = T; extrap = constant; pieces = {4.0, 300.0, 0.3378748+7.672235E-7*T^1-3.529109E-8*T^2}

Physics
  mf: InductionCurrents "Magnetic Fields" on all domains
    dependent variable A = {Ax, Ay, Az}
    al1: AmperesLaw "Ampère's Law 1" (default) | ConstitutiveRelationH = RelativePermeability; materialType = from_mat
    mi1: MagneticInsulation (default)
    init1: init "Initial Values 1" (default)
    al2: AmperesLaw "Ampère's Law 2" on domains 2-7 | ConstitutiveRelationH = HBCurve; materialType = from_mat
    al3: AmperesLaw "Ampère's Law 3" on domains 3
      sigma_mat = PorousMedia
      ConstitutiveRelationH = Magnetization
      M = {0, 995000, 0}
      materialType = from_mat
    mtcd1: MultiTurnCoilDomain (disabled) on no domains
      CoilType = Circular
      ICoil = -imax/2[A]
      N = nb
      coilWindArea = 0.05e-6[m^2]
      materialType = from_mat
      cre1: CoilReferenceEdge "Reference Edge 1" on no edges
    mtcd2: MultiTurnCoilDomain (disabled) on no domains
      CoilType = Circular
      CoilName = 2
      ICoil = imax[A]
      N = nb
      coilWindArea = 0.05e-6[m^2]
      materialType = from_mat
      cre1: CoilReferenceEdge "Reference Edge 1" on no edges
    mtcd3: MultiTurnCoilDomain (disabled) on no domains
      CoilType = Circular
      CoilName = 3
      ICoil = -imax/2[A]
      N = nb
      coilWindArea = 0.05e-6[m^2]
      materialType = from_mat
      cre1: CoilReferenceEdge "Reference Edge 1" on no edges
    fcal1: ForceCalculation on domains 5-7
    mi2: MagneticInsulation on boundaries 7, 10, 13, 16-18, 25, 29, 32, 33, 35, 38

Mesh
  mesh1 "Mesh 1" (physics-controlled)
    size: MeshSizeDefault | hauto = 3

Studies
  std1 "Validacao_modelo"
    param: Parametric "Parametric Sweep"
      sweeptype = filled
      pname = {dx, dy, ge, hm, hiee}
      plistarr = {range(0,0.1,0.3), range(0,0.1,0.3), range(1,0.2,1.4), range(8,2,12), range(6,2,8)}
      punit = {, , , , }
    stat: Stationary | notsolmethod = sol; notstudy = std1; sweeptype = sparse

Solver configurations
  sol1 "Solution 1" (study std1)
    v1: Variables "Dependent Variables 1"
    s1: Stationary "Stationary Solver 1"
      fc1: FullyCoupled | linsolver = i1
      i1: Iterative | linsolver = fgmres
        mg1: Multigrid
  sol2 "Parametric Solutions 1" (study std1)

Datasets
  dset1: Solution | solution = sol1
  dset2: Solution | solution = sol2

Derived values
  gev1: EvalGlobal "Global Evaluation 1" | data = dset2; table = tbl1; expr = mf.Forcex_0

Tables
  tbl1: Table
    // Global Evaluation 1 (mf.Forcex_0)
    dx | dy | ge | hm | hiee | Electromagnetic force, x component (N)
    0 | 0 | 1 | 8 | 6 | -23.9886
    0 | 0 | 1 | 8 | 8 | -24.659
    0 | 0 | 1 | 10 | 6 | -26.8671
    0 | 0 | 1 | 10 | 8 | -27.2641
    0 | 0 | 1 | 12 | 6 | -28.783
    0 | 0 | 1 | 12 | 8 | -29.0579
    0 | 0 | 1.2 | 8 | 6 | -19.2795
    0 | 0 | 1.2 | 8 | 8 | -20.438
    0 | 0 | 1.2 | 10 | 6 | -21.8059
    0 | 0 | 1.2 | 10 | 8 | -22.7267
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
Plots
  pg1: PlotGroup2D "2D Plot Group 1"